*HEADING
 space_frame  element=B33  units=N-m-Pa
** generated by export_inp.py from the same model definition
*PREPRINT, ECHO=NO, MODEL=NO, HISTORY=NO
*NODE
 1, 0, 0, 0
 2, 6, 0, 0
 3, 12, 0, 0
 4, 0, 5, 0
 5, 6, 5, 0
 6, 12, 5, 0
 7, 0, 0, 3.6
 8, 6, 0, 3.6
 9, 12, 0, 3.6
 10, 0, 5, 3.6
 11, 6, 5, 3.6
 12, 12, 5, 3.6
 13, 0, 0, 7.2
 14, 6, 0, 7.2
 15, 12, 0, 7.2
 16, 0, 5, 7.2
 17, 6, 5, 7.2
 18, 12, 5, 7.2
*ELEMENT, TYPE=B33, ELSET=E1
 1, 1, 7
*ELEMENT, TYPE=B33, ELSET=E2
 2, 2, 8
*ELEMENT, TYPE=B33, ELSET=E3
 3, 3, 9
*ELEMENT, TYPE=B33, ELSET=E4
 4, 4, 10
*ELEMENT, TYPE=B33, ELSET=E5
 5, 5, 11
*ELEMENT, TYPE=B33, ELSET=E6
 6, 6, 12
*ELEMENT, TYPE=B33, ELSET=E7
 7, 7, 13
*ELEMENT, TYPE=B33, ELSET=E8
 8, 8, 14
*ELEMENT, TYPE=B33, ELSET=E9
 9, 9, 15
*ELEMENT, TYPE=B33, ELSET=E10
 10, 10, 16
*ELEMENT, TYPE=B33, ELSET=E11
 11, 11, 17
*ELEMENT, TYPE=B33, ELSET=E12
 12, 12, 18
*ELEMENT, TYPE=B33, ELSET=E13
 13, 7, 8
*ELEMENT, TYPE=B33, ELSET=E14
 14, 8, 9
*ELEMENT, TYPE=B33, ELSET=E15
 15, 10, 11
*ELEMENT, TYPE=B33, ELSET=E16
 16, 11, 12
*ELEMENT, TYPE=B33, ELSET=E17
 17, 7, 10
*ELEMENT, TYPE=B33, ELSET=E18
 18, 8, 11
*ELEMENT, TYPE=B33, ELSET=E19
 19, 9, 12
*ELEMENT, TYPE=B33, ELSET=E20
 20, 13, 14
*ELEMENT, TYPE=B33, ELSET=E21
 21, 14, 15
*ELEMENT, TYPE=B33, ELSET=E22
 22, 16, 17
*ELEMENT, TYPE=B33, ELSET=E23
 23, 17, 18
*ELEMENT, TYPE=B33, ELSET=E24
 24, 13, 16
*ELEMENT, TYPE=B33, ELSET=E25
 25, 14, 17
*ELEMENT, TYPE=B33, ELSET=E26
 26, 15, 18
*BEAM GENERAL SECTION, ELSET=E1, SECTION=GENERAL, DENSITY=0.
 0.012, 2e-05, 0., 0.0004, 1e-06
 1, 0, 0
 2.1e+11, 8.076923077e+10
*BEAM GENERAL SECTION, ELSET=E2, SECTION=GENERAL, DENSITY=0.
 0.012, 2e-05, 0., 0.0004, 1e-06
 1, 0, 0
 2.1e+11, 8.076923077e+10
*BEAM GENERAL SECTION, ELSET=E3, SECTION=GENERAL, DENSITY=0.
 0.012, 2e-05, 0., 0.0004, 1e-06
 1, 0, 0
 2.1e+11, 8.076923077e+10
*BEAM GENERAL SECTION, ELSET=E4, SECTION=GENERAL, DENSITY=0.
 0.012, 2e-05, 0., 0.0004, 1e-06
 1, 0, 0
 2.1e+11, 8.076923077e+10
*BEAM GENERAL SECTION, ELSET=E5, SECTION=GENERAL, DENSITY=0.
 0.012, 2e-05, 0., 0.0004, 1e-06
 1, 0, 0
 2.1e+11, 8.076923077e+10
*BEAM GENERAL SECTION, ELSET=E6, SECTION=GENERAL, DENSITY=0.
 0.012, 2e-05, 0., 0.0004, 1e-06
 1, 0, 0
 2.1e+11, 8.076923077e+10
*BEAM GENERAL SECTION, ELSET=E7, SECTION=GENERAL, DENSITY=0.
 0.012, 2e-05, 0., 0.0004, 1e-06
 1, 0, 0
 2.1e+11, 8.076923077e+10
*BEAM GENERAL SECTION, ELSET=E8, SECTION=GENERAL, DENSITY=0.
 0.012, 2e-05, 0., 0.0004, 1e-06
 1, 0, 0
 2.1e+11, 8.076923077e+10
*BEAM GENERAL SECTION, ELSET=E9, SECTION=GENERAL, DENSITY=0.
 0.012, 2e-05, 0., 0.0004, 1e-06
 1, 0, 0
 2.1e+11, 8.076923077e+10
*BEAM GENERAL SECTION, ELSET=E10, SECTION=GENERAL, DENSITY=0.
 0.012, 2e-05, 0., 0.0004, 1e-06
 1, 0, 0
 2.1e+11, 8.076923077e+10
*BEAM GENERAL SECTION, ELSET=E11, SECTION=GENERAL, DENSITY=0.
 0.012, 2e-05, 0., 0.0004, 1e-06
 1, 0, 0
 2.1e+11, 8.076923077e+10
*BEAM GENERAL SECTION, ELSET=E12, SECTION=GENERAL, DENSITY=0.
 0.012, 2e-05, 0., 0.0004, 1e-06
 1, 0, 0
 2.1e+11, 8.076923077e+10
*BEAM GENERAL SECTION, ELSET=E13, SECTION=GENERAL, DENSITY=0.
 0.01, 4e-05, 0., 0.0003, 8e-07
 0, 0, 1
 2.1e+11, 8.076923077e+10
*BEAM GENERAL SECTION, ELSET=E14, SECTION=GENERAL, DENSITY=0.
 0.01, 4e-05, 0., 0.0003, 8e-07
 0, 0, 1
 2.1e+11, 8.076923077e+10
*BEAM GENERAL SECTION, ELSET=E15, SECTION=GENERAL, DENSITY=0.
 0.01, 4e-05, 0., 0.0003, 8e-07
 0, 0, 1
 2.1e+11, 8.076923077e+10
*BEAM GENERAL SECTION, ELSET=E16, SECTION=GENERAL, DENSITY=0.
 0.01, 4e-05, 0., 0.0003, 8e-07
 0, 0, 1
 2.1e+11, 8.076923077e+10
*BEAM GENERAL SECTION, ELSET=E17, SECTION=GENERAL, DENSITY=0.
 0.01, 4e-05, 0., 0.0003, 8e-07
 0, 0, 1
 2.1e+11, 8.076923077e+10
*BEAM GENERAL SECTION, ELSET=E18, SECTION=GENERAL, DENSITY=0.
 0.01, 4e-05, 0., 0.0003, 8e-07
 0, 0, 1
 2.1e+11, 8.076923077e+10
*BEAM GENERAL SECTION, ELSET=E19, SECTION=GENERAL, DENSITY=0.
 0.01, 4e-05, 0., 0.0003, 8e-07
 0, 0, 1
 2.1e+11, 8.076923077e+10
*BEAM GENERAL SECTION, ELSET=E20, SECTION=GENERAL, DENSITY=0.
 0.01, 4e-05, 0., 0.0003, 8e-07
 0, 0, 1
 2.1e+11, 8.076923077e+10
*BEAM GENERAL SECTION, ELSET=E21, SECTION=GENERAL, DENSITY=0.
 0.01, 4e-05, 0., 0.0003, 8e-07
 0, 0, 1
 2.1e+11, 8.076923077e+10
*BEAM GENERAL SECTION, ELSET=E22, SECTION=GENERAL, DENSITY=0.
 0.01, 4e-05, 0., 0.0003, 8e-07
 0, 0, 1
 2.1e+11, 8.076923077e+10
*BEAM GENERAL SECTION, ELSET=E23, SECTION=GENERAL, DENSITY=0.
 0.01, 4e-05, 0., 0.0003, 8e-07
 0, 0, 1
 2.1e+11, 8.076923077e+10
*BEAM GENERAL SECTION, ELSET=E24, SECTION=GENERAL, DENSITY=0.
 0.01, 4e-05, 0., 0.0003, 8e-07
 0, 0, 1
 2.1e+11, 8.076923077e+10
*BEAM GENERAL SECTION, ELSET=E25, SECTION=GENERAL, DENSITY=0.
 0.01, 4e-05, 0., 0.0003, 8e-07
 0, 0, 1
 2.1e+11, 8.076923077e+10
*BEAM GENERAL SECTION, ELSET=E26, SECTION=GENERAL, DENSITY=0.
 0.01, 4e-05, 0., 0.0003, 8e-07
 0, 0, 1
 2.1e+11, 8.076923077e+10
*NSET, NSET=ALLN, GENERATE
 1, 18, 1
*BOUNDARY
 1, 1, 1
 1, 2, 2
 1, 3, 3
 1, 4, 4
 1, 5, 5
 1, 6, 6
 2, 1, 1
 2, 2, 2
 2, 3, 3
 2, 4, 4
 2, 5, 5
 2, 6, 6
 3, 1, 1
 3, 2, 2
 3, 3, 3
 3, 4, 4
 3, 5, 5
 3, 6, 6
 4, 1, 1
 4, 2, 2
 4, 3, 3
 4, 4, 4
 4, 5, 5
 4, 6, 6
 5, 1, 1
 5, 2, 2
 5, 3, 3
 5, 4, 4
 5, 5, 5
 5, 6, 6
 6, 1, 1
 6, 2, 2
 6, 3, 3
 6, 4, 4
 6, 5, 5
 6, 6, 6
*STEP, NAME=STATIC, PERTURBATION
*STATIC
*DLOAD
 E13, PZ, -18000
 E14, PZ, -18000
 E15, PZ, -18000
 E16, PZ, -18000
 E17, PZ, -18000
 E18, PZ, -18000
 E19, PZ, -18000
 E20, PZ, -18000
 E21, PZ, -18000
 E22, PZ, -18000
 E23, PZ, -18000
 E24, PZ, -18000
 E25, PZ, -18000
 E26, PZ, -18000
*NODE PRINT, NSET=ALLN, SUMMARY=NO
 U,
*NODE PRINT, NSET=ALLN, SUMMARY=NO
 RF,
*OUTPUT, FIELD
*NODE OUTPUT
 U, RF
*END STEP
